integral(integral(const - |x| - |y|, x = y1 .. y2), y = x1 .. x2) → const*x1*y1 - const*x1*y2 - const*x2*y1 + const*x2*y2 - x1*y1^2/(2*signum(y1, 0)) + x2*y1^2/(2*signum(y1, 0)) + x1*y2^2/(2*signum(y2, 0)) - x2*y2^2/(2*signum(y2, 0)) - x1^2*y1/(2*signum(x1, 0)) + x1^2*y2/(2*signum(x1, 0)) + x2^2*y1/(2*signum(x2, 0)) - x2^2*y2/(2*signum(x2, 0))
integral(|x|, x = x1 .. x2) → x2*|x2|/2 - x1*|x1|/2
integral(|y|, y = y1 .. y2) → y2*|y2|/2 - y1*|y1|/2
integral(integral(const, x = y1 .. y2), y = x1 .. x2) → const*(x1 - x2)*(y1 - y2)
integral(integral(|x|, x = y1 .. y2), y = x1 .. x2) → (x1 - x2)*(y1*|y1| - y2*|y2|)/2
integral(integral(|y|, x = y1 .. y2), y = x1 .. x2) → (y1 - y2)*(x1^2*signum(x2, 0) - x2^2*signum(x1, 0))/(2*signum(x1, 0)*signum(x2, 0))
const := 5
x1 := -3
y1 := 0
x2 := 3
y2 := 4
integral(integral(const - |x| - |y|, x = y1 .. y2), y = x1 .. x2) → 36
integral(|x|, x = x1 .. x2) → 9
integral(|y|, y = y1 .. y2) → 8
integral(integral(const, x = y1 .. y2), y = x1 .. x2) → 120
integral(integral(|x|, x = y1 .. y2), y = x1 .. x2) → 48
integral(integral(|y|, x = y1 .. y2), y = x1 .. x2) → 36
